*Heading
** Job name: Job-1205-soil Model name: Model-1
** Generated by: Abaqus/CAE 2016
*Preprint, echo=NO, model=NO, history=NO, contact=NO
**
** PARTS
**
*Part, name=bed-rock
*End Part
**
*Part, name=c1
*End Part
**
*Part, name=c2
*End Part
**
*Part, name=c3
*End Part
**
*Part, name=up-soil
*End Part
**
**
** ASSEMBLY
**
*Assembly, name=Assembly
**
*Instance, name=bed-rock-1, part=bed-rock
*Node
      1,        -130.,           0.
      2,        -128.,           0.
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*Element, type=CPE4P
  1,   1,   2, 133, 132
  2,   2,   3, 134, 133
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*Nset, nset=_PickedSet2, internal, generate
   1,  524,    1
*Elset, elset=_PickedSet2, internal, generate
   1,  390,    1
** Section: Section-1
*Solid Section, elset=_PickedSet2, material=Material-1
1.,
*End Instance
**
*Instance, name=up-soil-1, part=up-soil
*Node
      1,   96.1364594,          28.
      2,   96.1364594,           6.
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*Element, type=CPE4P
  1,    1,   57,  898,  106
  2,   57,   58,  899,  898
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*Nset, nset=_PickedSet7, internal
   17,   18,   19,   20,   21,   24
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*Elset, elset=_PickedSet7, internal
  651,  652,  653,  654,  655,  656
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*Nset, nset=_PickedSet8, internal
    1,    4,    6,    7,   14,   20
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*Elset, elset=_PickedSet8, internal
  736,  737,  738,  739,  740,  741
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*Nset, nset=_PickedSet10, internal
    1,    2,    3,    4,    5,    6
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*Elset, elset=_PickedSet10, internal
    1,    2,    3,    4,    5,    6
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*Nset, nset=_PickedSet45, internal, generate
    1,  2901,     1
*Elset, elset=_PickedSet45, internal, generate
    1,  2752,     1
** Section: Section-1
*Solid Section, elset=_PickedSet45, material=Material-1
1.,
*End Instance
**
*Instance, name=c1-1, part=c1
         -1.,           0.,           0.
*End Instance
**
*Instance, name=c2-1, part=c2
         -1.,           0.,           0.
*End Instance
**
*Instance, name=c3-1, part=c3
         0.5,           0.,           0.
*End Instance
**
*Nset, nset=bottom, instance=bed-rock-1, generate
   1,  131,    1
*Elset, elset=bottom, instance=bed-rock-1, generate
   1,  130,    1
*Nset, nset=downup, instance=bed-rock-1, generate
 394,  524,    1
*Elset, elset=downup, instance=bed-rock-1, generate
 261,  390,    1
*Elset, elset=eall, instance=bed-rock-1, generate
   1,  390,    1
*Elset, elset=eall, instance=up-soil-1, generate
    1,  2752,     1
*Elset, elset=equivant-load, instance=up-soil-1
 1013, 1020, 1027, 1034, 1041, 1048
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*Nset, nset=left, instance=bed-rock-1, generate
   1,  394,  131
*Nset, nset=left, instance=up-soil-1
   7,   8,  47,  48,  53, 128
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*Elset, elset=left, instance=bed-rock-1, generate
   1,  261,  130
*Elset, elset=left, instance=up-soil-1
  298,  299,  300,  301,  302,  303
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*Nset, nset=nall, instance=bed-rock-1, generate
   1,  524,    1
*Nset, nset=nall, instance=up-soil-1, generate
    1,  2901,     1
*Nset, nset=right, instance=bed-rock-1, generate
 131,  524,  131
*Nset, nset=right, instance=up-soil-1
   3,   4,  17,  21,  56,  82
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*Elset, elset=_PickedSet175, internal, instance=up-soil-1, generate
 1538,  1822,     1
*Nset, nset=_PickedSet176, internal, instance=up-soil-1
   19,   20,   24,   25,   27,   49
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*Elset, elset=_PickedSet176, internal, instance=up-soil-1, generate
 1853,  2247,     1
*Nset, nset=_PickedSet177, internal, instance=up-soil-1
   22,   23,   24,   25,   26,   27
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*Elset, elset=_PickedSet177, internal, instance=up-soil-1
  736,  737,  738,  739,  740,  741
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*Nset, nset=_PickedSet178, internal, instance=up-soil-1
  22,  23,  26,  28,  29,  30
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*Elset, elset=_PickedSet178, internal, instance=up-soil-1
  786,  787,  788,  789,  790,  791
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*Nset, nset=_PickedSet183, internal, instance=up-soil-1
    9,   12,   15,   29,   30,   39
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*Elset, elset=_PickedSet183, internal, instance=up-soil-1, generate
 863,  970,    1
*Nset, nset=_PickedSet197, internal, instance=up-soil-1, generate
    1,  2901,     1
*Elset, elset=_PickedSet197, internal, instance=up-soil-1, generate
    1,  2752,     1
*Nset, nset=_PickedSet198, internal, instance=up-soil-1
   33,   38,   41,   42,  438,  439
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*Elset, elset=_PickedSet198, internal, instance=up-soil-1, generate
  971,  1006,     1
*Nset, nset=_PickedSet199, internal, instance=up-soil-1
   33,   34,   35,   36,   37,   38
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*Elset, elset=_PickedSet199, internal, instance=up-soil-1, generate
 827,  862,    1
*Nset, nset=_PickedSet205, internal, instance=up-soil-1, generate
    1,  2901,     1
*Elset, elset=_PickedSet205, internal, instance=up-soil-1, generate
    1,  2752,     1
*Nset, nset=_PickedSet215, internal, instance=bed-rock-1, generate
   1,  524,    1
*Nset, nset=_PickedSet215, internal, instance=up-soil-1, generate
    1,  2901,     1
*Elset, elset=_PickedSet215, internal, instance=bed-rock-1, generate
   1,  390,    1
*Elset, elset=_PickedSet215, internal, instance=up-soil-1, generate
    1,  2752,     1
*Nset, nset=_PickedSet216, internal, instance=bed-rock-1, generate
   1,  524,    1
*Elset, elset=_PickedSet216, internal, instance=bed-rock-1, generate
   1,  390,    1
*Nset, nset=_PickedSet259, internal, instance=up-soil-1
   33,   34,   35,   36,   37,   38
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*Elset, elset=_PickedSet259, internal, instance=up-soil-1
  827,  828,  829,  830,  831,  832
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*Elset, elset=_Surf-1_S3, internal, instance=up-soil-1
 300,
*Surface, type=ELEMENT, name=Surf-1
_Surf-1_S3, S3
*Elset, elset=_p1_S4, internal, instance=up-soil-1, generate
 177,  298,   11
*Surface, type=ELEMENT, name=p1
_p1_S4, S4
*Elset, elset=_p2_S4, internal, instance=up-soil-1, generate
 414,  535,   11
*Surface, type=ELEMENT, name=p2
_p2_S4, S4
*Elset, elset=_p3_S3, internal, instance=up-soil-1
 2426, 2430, 2442, 2444, 2445, 2449, 2452, 2492
*Elset, elset=_p3_S1, internal, instance=up-soil-1
 2428, 2450, 2474, 2475, 2481, 2485, 2490
*Elset, elset=_p3_S2, internal, instance=up-soil-1
 2482,
*Surface, type=ELEMENT, name=p3
_p3_S3, S3
_p3_S1, S1
_p3_S2, S2
*Elset, elset=_p4_S4, internal, instance=up-soil-1, generate
 1007,  1091,     7
*Surface, type=ELEMENT, name=p4
_p4_S4, S4
*Elset, elset=_p5_S2, internal, instance=up-soil-1
 2628, 2635, 2691, 2692
*Elset, elset=_p5_S4, internal, instance=up-soil-1
 2632, 2639, 2642, 2643, 2645, 2658, 2678, 2682, 2695
*Surface, type=ELEMENT, name=p5
_p5_S2, S2
_p5_S4, S4
*Elset, elset=_p6_S4, internal, instance=up-soil-1, generate
 546,  644,    7
*Surface, type=ELEMENT, name=p6
_p6_S4, S4
*Elset, elset=_p7_S2, internal, instance=up-soil-1, generate
 315,  413,    7
*Surface, type=ELEMENT, name=p7
_p7_S2, S2
*Elset, elset=_p8_S2, internal, instance=up-soil-1
 2254,
*Elset, elset=_p8_S3, internal, instance=up-soil-1
 2255, 2264, 2265, 2267, 2268
*Elset, elset=_p8_S1, internal, instance=up-soil-1
 2258, 2270, 2273, 2279, 2304, 2305, 2307, 2310
*Elset, elset=_p8_S4, internal, instance=up-soil-1
 2259, 2299
*Surface, type=ELEMENT, name=p8
_p8_S2, S2
_p8_S3, S3
_p8_S4, S4
_p8_S1, S1
*Elset, elset=_p9_S2, internal, instance=up-soil-1, generate
  11,  176,   11
*Surface, type=ELEMENT, name=p9
_p9_S2, S2
*Elset, elset=__PickedSurf203_S2, internal, instance=up-soil-1
   11,   22,   33,   44,   55,   66
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*Elset, elset=__PickedSurf203_S3, internal, instance=up-soil-1
 2255, 2264, 2265, 2267, 2268, 2426, 2430, 2442, 2444, 2445, 2449, 2452, 2492
*Elset, elset=__PickedSurf203_S1, internal, instance=up-soil-1
 2258, 2270, 2273, 2279, 2304, 2305, 2307, 2310, 2428, 2450, 2474, 2475, 2481, 2485, 2490
*Elset, elset=__PickedSurf203_S4, internal, instance=up-soil-1
  177,  188,  199,  210,  221,  232
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*Surface, type=ELEMENT, name=_PickedSurf203, internal
__PickedSurf203_S2, S2
__PickedSurf203_S3, S3
__PickedSurf203_S4, S4
__PickedSurf203_S1, S1
*Elset, elset=__PickedSurf204_S3, internal, instance=bed-rock-1, generate
 261,  390,    1
*Surface, type=ELEMENT, name=_PickedSurf204, internal
__PickedSurf204_S3, S3
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*Nset, nset=_PickedSet260_PP_, internal, instance=up-soil-1
  46,  47,  55,  56, 508, 509
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*Nset, nset=_PickedSet263_PP_, internal, instance=bed-rock-1, generate
   1,  131,    1
*Enrichment, name=abc, type=PROPAGATION CRACK, elset=_PickedSet197, interaction=IntProp-1
*surface,type=xfem,name=efgh
abc
*End Assembly
*Amplitude, name=volumerate
             0.,              0.,             63.,           -200.
**
** MATERIALS
**
*Material, name=Material-1
**Damage Initiation, criterion=MAXPS, tolerance=0.1
*Damage Initiation, criterion=MAXPS, position=CRACKTIP, tolerance=0.1
10,
*Damage Evolution, type=ENERGY, mixed mode behavior=POWER LAW, power=1.
0.01,0.01,0.01
*Damage Stabilization
1e-03
*Density
1500.,
*Elastic
 10e+06, 0.3
*Fluid Leakoff
 5.879e-16, 5.879e-16
*Gap Flow
 1e-06,
*Permeability, specific=10000.
 2.418e-05,0.
**
** INTERACTION PROPERTIES
**
*Surface Interaction, name=IntProp-1
1.,
*Friction, slip tolerance=0.005
 0.2,
*Initial Conditions, type=ENRICHMENT
up-soil-1.1007, 1,abc, 1.01646, -1.
up-soil-1.1007, 2,abc, 1.01646, 1.
up-soil-1.1007, 3,abc, -0.995848, 1.
up-soil-1.1007, 4,abc, -0.995848, -1.
up-soil-1.2307, 1,abc, -0.976044, -1.
up-soil-1.2307, 2,abc, 1.06771, -1.
up-soil-1.2307, 3,abc, 0.87915, 0.792534
up-soil-1.2307, 4,abc, -1.10934, 0.831522
up-soil-1.2695, 1,abc, 1.01492, -1.
up-soil-1.2695, 2,abc, 0.976195, 1.02634
up-soil-1.2695, 3,abc, -1.11517, 0.964817
up-soil-1.2695, 4,abc, -0.997387, -1.
**
** BOUNDARY CONDITIONS
**
** Name: BC-1 Type: Displacement/Rotation
*Boundary
left, 1, 1
** Name: BC-2 Type: Displacement/Rotation
*Boundary
right, 1, 1
** Name: BC-3 Type: Displacement/Rotation
*Boundary
bottom, 1, 1
bottom, 2, 2
** Name: BC-5 Type: Displacement/Rotation
*Boundary
downup, 2, 2
*Boundary,phantom=node
up-soil-1.505,2,2
up-soil-1.43,2,2
up-soil-1.892,2,2
up-soil-1.893,2,2
up-soil-1.857,2,2
up-soil-1.858,2,2
**
** PREDEFINED FIELDS
**
** Name: Predefined Field-1   Type: Geostatic stress
*Initial Conditions, type=STRESS, GEOSTATIC
_PickedSet205, 0., 44., -380000., 6., 0.6, 0.6
** Name: Predefined Field-2   Type: Geostatic stress
*Initial Conditions, type=STRESS, GEOSTATIC
_PickedSet216, -380000., 6., -440000., 0., 0.6, 0.6
** Name: Predefined Field-3   Type: Void ratio
*Initial Conditions, TYPE=RATIO
nall, 1.
** Name: Predefined Field-5   Type: Pore pressure Using Field: AnalyticalField-1
*Initial Conditions, TYPE=PORE PRESSURE
bed-rock-1.1, 440000.
bed-rock-1.2, 440000.
bed-rock-1.3, 440000.
bed-rock-1.4, 440000.
bed-rock-1.5, 440000.
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up-soil-1.2901, 312045.
**
** INTERACTIONS
**
** Interaction: Int-1
*Contact Pair, interaction=IntProp-1, type=SURFACE TO SURFACE
_PickedSurf204, _PickedSurf203
** ----------------------------------------------------------------
**
** STEP: gravity
**
*Step, name=gravity, nlgeom=YES, unsymm=YES
*Geostatic
**
** BOUNDARY CONDITIONS
**
** Name: BC-6 Type: Pore pressure Using Analytical Field: AnalyticalField-1
*Boundary
bed-rock-1.1, 8, 8, 440000.
bed-rock-1.132, 8, 8, 420000.
bed-rock-1.263, 8, 8, 400000.
bed-rock-1.394, 8, 8, 380000.
up-soil-1.7, 8, 8, 160000.
up-soil-1.8, 8, 8, 380000.
up-soil-1.47, 8, 8, 0.
up-soil-1.48, 8, 8, 50000.
up-soil-1.53, 8, 8, 130000.
up-soil-1.128, 8, 8, 180000.
up-soil-1.129, 8, 8, 200000.
up-soil-1.130, 8, 8, 220000.
up-soil-1.131, 8, 8, 240000.
up-soil-1.132, 8, 8, 260000.
up-soil-1.133, 8, 8, 280000.
up-soil-1.134, 8, 8, 300000.
up-soil-1.135, 8, 8, 320000.
up-soil-1.136, 8, 8, 340000.
up-soil-1.137, 8, 8, 360000.
up-soil-1.528, 8, 8, 16666.7
up-soil-1.529, 8, 8, 33333.3
up-soil-1.654, 8, 8, 145000.
up-soil-1.655, 8, 8, 66000.
up-soil-1.656, 8, 8, 82000.
up-soil-1.657, 8, 8, 98000.
up-soil-1.658, 8, 8, 114000.
** Name: BC-7 Type: Pore pressure Using Analytical Field: AnalyticalField-1
*Boundary
bed-rock-1.131, 8, 8, 440000.
bed-rock-1.262, 8, 8, 420000.
bed-rock-1.393, 8, 8, 400000.
bed-rock-1.524, 8, 8, 380000.
up-soil-1.3, 8, 8, 380000.
up-soil-1.4, 8, 8, 160000.
up-soil-1.17, 8, 8, 50000.
up-soil-1.21, 8, 8, 130000.
up-soil-1.56, 8, 8, 0.
up-soil-1.82, 8, 8, 360000.
up-soil-1.83, 8, 8, 340000.
up-soil-1.84, 8, 8, 320000.
up-soil-1.85, 8, 8, 300000.
up-soil-1.86, 8, 8, 280000.
up-soil-1.87, 8, 8, 260000.
up-soil-1.88, 8, 8, 240000.
up-soil-1.89, 8, 8, 220000.
up-soil-1.90, 8, 8, 200000.
up-soil-1.91, 8, 8, 180000.
up-soil-1.290, 8, 8, 114000.
up-soil-1.291, 8, 8, 98000.
up-soil-1.292, 8, 8, 82000.
up-soil-1.293, 8, 8, 66000.
up-soil-1.550, 8, 8, 145000.
up-soil-1.845, 8, 8, 33333.3
up-soil-1.846, 8, 8, 16666.7
** Name: BC-8 Type: Pore pressure
*Boundary
_PickedSet260_PP_, 8, 8
** Name: BC-12 Type: Pore pressure
*Boundary
_PickedSet263_PP_, 8, 8, 440000.
**
** LOADS
**
** Name: gravity   Type: Gravity
*Dload
_PickedSet215, GRAV, 10., 0., -1.
**
** OUTPUT REQUESTS
**
*Restart, write, frequency=0
**
** FIELD OUTPUT: F-Output-1
**
*Output, field
*Node Output
CF, PHILSM, POR, PSILSM, RF, U
*Element Output, directions=YES
LE, S, SAT, VOIDR
*Contact Output
CDISP, CSTRESS
**
** HISTORY OUTPUT: H-Output-1
**
*Output, history, variable=PRESELECT
*End Step
** ----------------------------------------------------------------
**
** STEP: Step-2
**
*Step, name=Step-2, nlgeom=YES, unsymm=YES
*Soils, consolidation, end=PERIOD, utol=1e+09
1., 1., 1e-05, 1.,
**
** INTERACTIONS
**
** Interaction: Int-2
*Model Change, remove
_PickedSet175,
**
** CONTROLS
**
*Controls, reset
*Controls, analysis=discontinuous
*Controls, parameters=time incrementation
, , , , , , , 20, , ,
**
** OUTPUT REQUESTS
**
*Restart, write, frequency=0
**
** FIELD OUTPUT: F-Output-1
**
*Output, field
*Node Output
CF, PHILSM, POR, PSILSM, RF, U
*Element Output, directions=YES
LE, S, SAT, VOIDR
*Contact Output
CDISP, CSTRESS
**
** HISTORY OUTPUT: H-Output-1
**
*Output, history, variable=PRESELECT
*End Step
** ----------------------------------------------------------------
**
** STEP: Step-3
**
*Step, name=Step-3, nlgeom=YES, unsymm=YES
*Soils, consolidation, end=PERIOD, utol=1e+09
1., 1., 1e-05, 1.,
**
** INTERACTIONS
**
** Interaction: Int-3
*Model Change, remove
_PickedSet176,
**
** OUTPUT REQUESTS
**
*Restart, write, frequency=0
**
** FIELD OUTPUT: F-Output-1
**
*Output, field
*Node Output
CF, PHILSM, POR, PSILSM, RF, U
*Element Output, directions=YES
LE, S, SAT, VOIDR
*Contact Output
CDISP, CSTRESS
**
** HISTORY OUTPUT: H-Output-1
**
*Output, history, variable=PRESELECT
*End Step
** ----------------------------------------------------------------
**
** STEP: Step-4
**
*Step, name=Step-4, nlgeom=YES, unsymm=YES
*Soils, consolidation, end=PERIOD, utol=1e+06
1., 1., 1e-12, 1.,
**
** INTERACTIONS
**
** Interaction: Int-4
*Model Change, remove
_PickedSet177,
**
** OUTPUT REQUESTS
**
*Restart, write, frequency=0
**
** FIELD OUTPUT: F-Output-1
**
*Output, field
*Node Output
CF, PHILSM, POR, PSILSM, RF, U
*Element Output, directions=YES
LE, S, SAT, VOIDR
*Contact Output
CDISP, CSTRESS
**
** HISTORY OUTPUT: H-Output-1
**
*Output, history, variable=PRESELECT
*End Step
** ----------------------------------------------------------------
**
** STEP: Step-5
**
*Step, name=Step-5, nlgeom=YES, unsymm=YES
*Soils, consolidation, end=PERIOD, utol=1e+07
1., 1., 1e-05, 1.,
**
** INTERACTIONS
**
** Interaction: Int-5
*Model Change, remove
_PickedSet178,
**
** OUTPUT REQUESTS
**
*Restart, write, frequency=0
**
** FIELD OUTPUT: F-Output-1
**
*Output, field
*Node Output
CF, PHILSM, POR, PSILSM, RF, U
*Element Output, directions=YES
LE, S, SAT, VOIDR
*Contact Output
CDISP, CSTRESS
**
** HISTORY OUTPUT: H-Output-1
**
*Output, history, variable=PRESELECT
*End Step
** ----------------------------------------------------------------
**
** STEP: Step-6
**
*Step, name=Step-6, nlgeom=YES, unsymm=YES
*Soils, consolidation, end=PERIOD, utol=1e+07
1., 1., 1e-05, 1.,
**
** INTERACTIONS
**
** Interaction: Int-6
*Model Change, remove
_PickedSet198,
**
** OUTPUT REQUESTS
**
*Restart, write, frequency=0
**
** FIELD OUTPUT: F-Output-1
**
*Output, field
*Node Output
CF, PHILSM, POR, PSILSM, RF, U
*Element Output, directions=YES
LE, S, SAT, VOIDR
*Contact Output
CDISP, CSTRESS
**
** HISTORY OUTPUT: H-Output-1
**
*Output, history, variable=PRESELECT
*End Step
** ----------------------------------------------------------------
**
** STEP: Step-7
**
*Step, name=Step-7, nlgeom=YES, unsymm=YES
*Soils, consolidation, end=PERIOD, utol=1e+07
1., 1., 1e-05, 1.,
**
** INTERACTIONS
**
** Interaction: Int-7
*Model Change, remove
_PickedSet199,
**
** OUTPUT REQUESTS
**
*Restart, write, frequency=0
**
** FIELD OUTPUT: F-Output-1
**
*Output, field
*Node Output
CF, PHILSM, POR, PSILSM, RF, U
*Element Output, directions=YES
LE, S, SAT, VOIDR
*Contact Output
CDISP, CSTRESS
**
** HISTORY OUTPUT: H-Output-1
**
*Output, history, variable=PRESELECT
*End Step
** ----------------------------------------------------------------
**
** STEP: Step-8
**
*Step, name=Step-8, nlgeom=YES, unsymm=YES
*Soils, consolidation, end=PERIOD, utol=1e+08
1., 1., 1e-05, 1.,
**
** INTERACTIONS
**
** Interaction: Int-8
*Model Change, add=WITH STRAIN
_PickedSet259,
**
** OUTPUT REQUESTS
**
*Restart, write, frequency=0
**
** FIELD OUTPUT: F-Output-1
**
*Output, field
*Node Output
CF, PHILSM, POR, PSILSM, RF, U
*Element Output, directions=YES
LE, S, SAT, VOIDR
*Contact Output
CDISP, CSTRESS
**
** HISTORY OUTPUT: H-Output-1
**
*Output, history, variable=PRESELECT
*End Step
** ----------------------------------------------------------------
**
** STEP: Step-10
**
*Step, name=Step-10, nlgeom=YES, amplitude=RAMP, inc=10000, unsymm=YES
*Soils, consolidation, end=PERIOD, utol=1e+09
1., 10., 1e-05, 1.,
*cflow,amplitude=volumerate,phantom=edge
up-soil-1.505,up-soil-1.43,5e-4
up-soil-1.892,up-soil-1.893,5e-4
up-soil-1.857,up-soil-1.858,5e-4
**
** INTERACTIONS
**
** Interaction: Int-10
*Model Change, remove
_PickedSet183,
**
** CONTROLS
**
*Controls, reset
*Controls, analysis=discontinuous
*Controls, parameters=time incrementation
, , , , , , , 20, , ,
**
** OUTPUT REQUESTS
**
*Restart, write, frequency=0
**
** FIELD OUTPUT: F-Output-1
**
*Output, field
*Node Output
CF, PHILSM, POR, PSILSM, RF, U
*Element Output, directions=YES
LE, S, SAT, VOIDR
*contact output,surface=efgh
CSDMG,CRKDISP,PORPRES,PORPRESURF,GFVR,LEAKVR,ALEAKVR
*element output,elset=eall
PFOPENXFEM
LEAKVRTXFEM
LEAKVRBXFEM
ALEAKVRTXFEM
ALEAKVRBXFEM
PORPRES
GFVRXFEM
PFOPENXFEMCOMP
PORPRESCOMP
CRDCUTXFEM
*Contact Output
CDISP, CSTRESS
**
** HISTORY OUTPUT: H-Output-1
**
*Output, history, variable=PRESELECT
*End Step
** ----------------------------------------------------------------
**
** STEP: extended_time
**
**Step, name=extended_time, nlgeom=YES, unsymm=YES
**Soils, consolidation, end=PERIOD, utol=1e+08
*Step, name=extended_time, nlgeom=YES, amplitude=RAMP, inc=10000, unsymm=YES
*Soils, consolidation, end=PERIOD, utol=1e+08, stabilize=0.0002, allsdtol=0.05, continue=NO
100., 100., 0.00000000001, 100.,
*cflow,amplitude=volumerate,phantom=edge
up-soil-1.505,up-soil-1.43,2e-3
up-soil-1.892,up-soil-1.893,2e-3
up-soil-1.857,up-soil-1.858,2e-3
**
** CONTROLS
**
*Controls, reset
*Controls, analysis=discontinuous
*Controls, parameters=time incrementation
, , , , , , , 20, , ,
**
** OUTPUT REQUESTS
**
*Restart, write, frequency=0
**
** FIELD OUTPUT: F-Output-1
**
*Output, field, frequency=10
*Node Output
CF, PHILSM, POR, PSILSM, RF, U
*Element Output, directions=YES
LE, S, SAT, VOIDR
*contact output,surface=efgh
CSDMG,CRKDISP,PORPRES,PORPRESURF,GFVR,LEAKVR,ALEAKVR
*element output,elset=eall
PFOPENXFEM
LEAKVRTXFEM
LEAKVRBXFEM
ALEAKVRTXFEM
ALEAKVRBXFEM
PORPRES
GFVRXFEM
PFOPENXFEMCOMP
PORPRESCOMP
CRDCUTXFEM
*Contact Output
CDISP, CSTRESS
**
** HISTORY OUTPUT: H-Output-1
**
*Output, history, variable=PRESELECT
*End Step
