*Heading
** Job name: Job-centrifuge Model name: Model-1
** Generated by: Abaqus/CAE 2016
*Preprint, echo=NO, model=NO, history=NO, contact=NO
**
** PARTS
**
*Part, name=middle-crack
*End Part
**
*Part, name=rock
*End Part
**
*Part, name=soil
*End Part
**
**
** ASSEMBLY
**
*Assembly, name=Assembly
**
*Instance, name=middle-crack-1, part=middle-crack
*End Instance
**
*Instance, name=rock-1, part=rock
*Node
      1,         51.5,           0.
      2,   49.5192261,           0.
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*Element, type=CPE4P
  1,   1,   2,  55,  54
  2,   2,   3,  56,  55
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*Nset, nset=rock, generate
   1,  212,    1
*Elset, elset=rock, generate
   1,  156,    1
** Section: rock
*Solid Section, elset=rock, material=soil
,
*End Instance
**
*Instance, name=soil-1, part=soil
*Node
      1,        -18.5,          20.
      2,        -18.5,          12.
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*Element, type=CPS4R
  1,   1,   9, 299,  94
  2,   9,  10, 300, 299
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*Element, type=CPE4P
 297,  215,  216,  573,  561
 298,  216,  217,  574,  573
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*Nset, nset=soil, generate
    1,  2184,     1
*Elset, elset=soil, generate
    1,  2060,     1
** Section: soil
*Solid Section, elset=soil, material=soil
,
*End Instance
**
*Nset, nset=excavation-face, instance=soil-1
   1,   2,   3,   4,   9,  10
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*Elset, elset=excavation-face, instance=soil-1, generate
   1,  296,    1
*Nset, nset=gravity, instance=rock-1, generate
   1,  212,    1
*Nset, nset=gravity, instance=soil-1
    1,    2,    3,    4,    5,    6
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*Elset, elset=gravity, instance=rock-1, generate
   1,  156,    1
*Elset, elset=gravity, instance=soil-1, generate
  297,  2060,     1
*Nset, nset=left-bc-edge, instance=rock-1, generate
  53,  212,   53
*Nset, nset=left-bc-edge, instance=soil-1
   7,   8, 127, 128, 129, 130
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*Elset, elset=left-bc-edge, instance=rock-1, generate
  52,  156,   52
*Elset, elset=left-bc-edge, instance=soil-1, generate
 2041,  2060,     1
*Nset, nset=left-prop-edge, instance=soil-1
   1,   7,  95,  96,  97,  98
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*Elset, elset=left-prop-edge, instance=soil-1, generate
 1420,  2060,    20
*Nset, nset=right-bc-edge, instance=rock-1, generate
   1,  160,   53
*Nset, nset=right-bc-edge, instance=soil-1
   5,   6, 248, 249, 250, 251
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*Elset, elset=right-bc-edge, instance=rock-1, generate
   1,  105,   52
*Elset, elset=right-bc-edge, instance=soil-1, generate
 329,  956,   33
*Nset, nset=right-prop-edge, instance=soil-1
   4,   6, 267, 268, 269, 270
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*Elset, elset=right-prop-edge, instance=soil-1, generate
 924,  956,    1
*Nset, nset=rock-bottom-bc-edge, instance=rock-1, generate
 160,  212,    1
*Elset, elset=rock-bottom-bc-edge, instance=rock-1, generate
 105,  156,    1
*Nset, nset=rock-up-bc-edge, instance=rock-1, generate
  1,  53,   1
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*Nset, nset=soil-up-after-pore-bc-edge, instance=soil-1
   1,   2,   3,   4,   6,   7
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*Elset, elset=xfem-ele-set, instance=soil-1, generate
    1,  2060,     1
*Elset, elset=_penetration-surface_S3, internal, instance=soil-1
 1641,
*Surface, type=ELEMENT, name=penetration-surface, type=XFEM
Crack-1
*Elset, elset=_rock-master_S1, internal, instance=rock-1, generate
  1,  52,   1
*Surface, type=ELEMENT, name=rock-master
_rock-master_S1, S1
*Elset, elset=_rock-up-bc-edge_S1, internal, instance=rock-1, generate
  1,  52,   1
*Surface, type=ELEMENT, name=rock-up-bc-edge
_rock-up-bc-edge_S1, S1
*Elset, elset=_soil-slave_S1, internal, instance=soil-1, generate
 297,  329,    1
*Elset, elset=_soil-slave_S4, internal, instance=soil-1
  957,  969,  981,  993, 1005, 1017
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*Surface, type=ELEMENT, name=soil-slave
_soil-slave_S1, S1
_soil-slave_S4, S4
*Nset, nset=soil-bottom-pore-bc-edge_PP_, internal, instance=soil-1
   5,   8, 146, 147, 148, 149
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*Nset, nset=soil-up-before-pore-bc-edge_PP_, internal, instance=soil-1
   1,   4,   6,   7,  59,  60
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*Nset, nset=soil-up-after-pore-bc-edge_PP_, internal, instance=soil-1
   1,   2,   3,   4,   6,   7
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*Enrichment, name=Crack-1, type=PROPAGATION CRACK, elset=soil-1.soil, interaction=IntProp-1
*End Assembly
*Amplitude, name=volumerate
             0.,              0.,             25.,           -200.,             50.,           -250.
*Amplitude, name=volumerate_1
             0.,              -250,             25.,           -275.,             50.,           -300.
*Amplitude, name=volumerate_2
             0.,              -300,             25.,           -325.,             50.,           -350.
**
** MATERIALS
**
*Material, name=soil
*Damage Initiation, criterion=MAXPS, position=CRACKTIP, tolerance=0.1
200000.,
*Damage Evolution, type=ENERGY, mixed mode behavior=POWER LAW, power=1.
10000.,10000.,10000.
*Damage Stabilization
0.0001
*Density
1616.,
*Elastic
 5e+07, 0.3
*Fluid Leakoff
 5.879e-16, 5.879e-16
*Gap Flow
 1e-06,
*Permeability, specific=10000.
 2.418e-05,0.
**
** INTERACTION PROPERTIES
**
*Surface Interaction, name=IntProp-1
1.,
*Surface Interaction, name=IntProp-2
1.,
*Friction
0.,
*Surface Behavior, pressure-overclosure=HARD
*Initial Conditions, type=ENRICHMENT
soil-1.298, 1,Crack-1, -0.5, -1.
soil-1.298, 2,Crack-1, 0.5, -1.
soil-1.298, 3,Crack-1, 0.5, 0.
soil-1.298, 4,Crack-1, -0.5, 0.
**
** BOUNDARY CONDITIONS
*Boundary, phantom=node
soil-1.216, 2,2
soil-1.217, 2,2
**
** Name: left-bc Type: Displacement/Rotation
*Boundary
left-bc-edge, 1, 1
left-bc-edge, 2, 2
** Name: right-bc Type: Displacement/Rotation
*Boundary
right-bc-edge, 1, 1
right-bc-edge, 2, 2
** Name: rock-bottom-bc Type: Displacement/Rotation
*Boundary
rock-bottom-bc-edge, 1, 1
rock-bottom-bc-edge, 2, 2
** Name: rock-up-bc Type: Displacement/Rotation
*Boundary
rock-up-bc-edge, 1, 1
rock-up-bc-edge, 2, 2
**
** PREDEFINED FIELDS
**
** Name: geo-rock   Type: Geostatic stress
*Initial Conditions, type=STRESS, GEOSTATIC
rock-1.rock, -323200., 0., -404000., -5., 0.7, 0.7
** Name: geo-soil   Type: Geostatic stress
*Initial Conditions, type=STRESS, GEOSTATIC
soil-1.soil, 0., 20., -323200., 0., 0.7, 0.7
** Name: pore   Type: Pore pressure Using Field: AnalyticalField-1
*Initial Conditions, TYPE=PORE PRESSURE
soil-1.1, 0.
soil-1.2, 80000.
soil-1.3, 80000.
soil-1.4, 0.
soil-1.5, 200000.
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soil-1.2184, 10000.
** Name: void-rock   Type: Void ratio
*Initial Conditions, TYPE=RATIO
rock-1.rock, 0.001
** Name: void-soil   Type: Void ratio
*Initial Conditions, TYPE=RATIO
soil-1.soil, 0.64
**
** INTERACTIONS
**
** Interaction: Int-1
*Contact Pair, interaction=IntProp-2, type=SURFACE TO SURFACE
soil-slave, rock-master
** ----------------------------------------------------------------
**
** STEP: gravity
**
*Step, name=gravity, nlgeom=YES, unsymm=YES
*Geostatic
**
** BOUNDARY CONDITIONS
**
** Name: bottom-pore-bc Type: Pore pressure
*Boundary
soil-bottom-pore-bc-edge_PP_, 8, 8, 200000.
** Name: left-pore-bc Type: Pore pressure Using Analytical Field: AnalyticalField-1
*Boundary
soil-1.7, 8, 8, 0.
soil-1.8, 8, 8, 200000.
soil-1.127, 8, 8, 10000.
soil-1.128, 8, 8, 20000.
soil-1.129, 8, 8, 30000.
soil-1.130, 8, 8, 40000.
soil-1.131, 8, 8, 50000.
soil-1.132, 8, 8, 60000.
soil-1.133, 8, 8, 70000.
soil-1.134, 8, 8, 80000.
soil-1.135, 8, 8, 90000.
soil-1.136, 8, 8, 100000.
soil-1.137, 8, 8, 110000.
soil-1.138, 8, 8, 120000.
soil-1.139, 8, 8, 130000.
soil-1.140, 8, 8, 140000.
soil-1.141, 8, 8, 150000.
soil-1.142, 8, 8, 160000.
soil-1.143, 8, 8, 170000.
soil-1.144, 8, 8, 180000.
soil-1.145, 8, 8, 190000.
** Name: right-pore-bc Type: Pore pressure Using Analytical Field: AnalyticalField-1
*Boundary
soil-1.5, 8, 8, 200000.
soil-1.6, 8, 8, 0.
soil-1.248, 8, 8, 190000.
soil-1.249, 8, 8, 180000.
soil-1.250, 8, 8, 170000.
soil-1.251, 8, 8, 160000.
soil-1.252, 8, 8, 150000.
soil-1.253, 8, 8, 140000.
soil-1.254, 8, 8, 130000.
soil-1.255, 8, 8, 120000.
soil-1.256, 8, 8, 110000.
soil-1.257, 8, 8, 100000.
soil-1.258, 8, 8, 90000.
soil-1.259, 8, 8, 80000.
soil-1.260, 8, 8, 70000.
soil-1.261, 8, 8, 60000.
soil-1.262, 8, 8, 50000.
soil-1.263, 8, 8, 40000.
soil-1.264, 8, 8, 30000.
soil-1.265, 8, 8, 20000.
soil-1.266, 8, 8, 10000.
** Name: up-pore-bc Type: Pore pressure
*Boundary
soil-up-before-pore-bc-edge_PP_, 8, 8
**
** LOADS
**
** Name: gravity   Type: Gravity
*Dload
gravity, GRAV, 10., 0., -1.
**
** OUTPUT REQUESTS
**
*Restart, write, frequency=0
**
** FIELD OUTPUT: F-Output-1
**
*Output, field
*Node Output
CF, PHILSM, POR, PSILSM, RF, U
*Element Output, directions=YES
LE, S, SAT, VOIDR
*Contact Output
CDISP, CSTRESS
*element output,elset=xfem-ele-set
PFOPENXFEM
PORPRES
PFOPENXFEMCOMP
PORPRESCOMP
**
** HISTORY OUTPUT: H-Output-1
**
*Output, history, variable=PRESELECT
*End Step
** ----------------------------------------------------------------
**
** STEP: execavation
**
*Step, name=execavation, nlgeom=YES, unsymm=YES
*Soils, consolidation, end=PERIOD, utol=1e+09
1., 1., 1e-12, 1.,
**
** BOUNDARY CONDITIONS
**
** Name: bottom-pore-bc Type: Pore pressure
*Boundary, op=NEW
** Name: exe-bottom-pore-bc Type: Pore pressure
*Boundary, op=NEW
soil-bottom-pore-bc-edge_PP_, 8, 8, 200000.
** Name: exe-left-pore-bc Type: Pore pressure Using Analytical Field: AnalyticalField-1
*Boundary, op=NEW
soil-1.7, 8, 8, 0.
soil-1.8, 8, 8, 200000.
soil-1.127, 8, 8, 10000.
soil-1.128, 8, 8, 20000.
soil-1.129, 8, 8, 30000.
soil-1.130, 8, 8, 40000.
soil-1.131, 8, 8, 50000.
soil-1.132, 8, 8, 60000.
soil-1.133, 8, 8, 70000.
soil-1.134, 8, 8, 80000.
soil-1.135, 8, 8, 90000.
soil-1.136, 8, 8, 100000.
soil-1.137, 8, 8, 110000.
soil-1.138, 8, 8, 120000.
soil-1.139, 8, 8, 130000.
soil-1.140, 8, 8, 140000.
soil-1.141, 8, 8, 150000.
soil-1.142, 8, 8, 160000.
soil-1.143, 8, 8, 170000.
soil-1.144, 8, 8, 180000.
soil-1.145, 8, 8, 190000.
** Name: exe-right-pore-bc Type: Pore pressure Using Analytical Field: AnalyticalField-1
*Boundary, op=NEW
soil-1.5, 8, 8, 200000.
soil-1.6, 8, 8, 0.
soil-1.248, 8, 8, 190000.
soil-1.249, 8, 8, 180000.
soil-1.250, 8, 8, 170000.
soil-1.251, 8, 8, 160000.
soil-1.252, 8, 8, 150000.
soil-1.253, 8, 8, 140000.
soil-1.254, 8, 8, 130000.
soil-1.255, 8, 8, 120000.
soil-1.256, 8, 8, 110000.
soil-1.257, 8, 8, 100000.
soil-1.258, 8, 8, 90000.
soil-1.259, 8, 8, 80000.
soil-1.260, 8, 8, 70000.
soil-1.261, 8, 8, 60000.
soil-1.262, 8, 8, 50000.
soil-1.263, 8, 8, 40000.
soil-1.264, 8, 8, 30000.
soil-1.265, 8, 8, 20000.
soil-1.266, 8, 8, 10000.
** Name: exe-up-pore-bc Type: Pore pressure
*Boundary, op=NEW
soil-up-before-pore-bc-edge_PP_, 8, 8
** Name: left-bc Type: Displacement/Rotation
*Boundary, op=NEW
left-bc-edge, 1, 1
left-bc-edge, 2, 2
** Name: left-pore-bc Type: Pore pressure Using Analytical Field: AnalyticalField-1
*Boundary, op=NEW
** Name: left-prop Type: Displacement/Rotation
*Boundary, op=NEW
left-prop-edge, 1, 1
left-prop-edge, 2, 2
** Name: right-bc Type: Displacement/Rotation
*Boundary, op=NEW
right-bc-edge, 1, 1
right-bc-edge, 2, 2
** Name: right-pore-bc Type: Pore pressure Using Analytical Field: AnalyticalField-1
*Boundary, op=NEW
** Name: right-prop Type: Displacement/Rotation
*Boundary, op=NEW
right-prop-edge, 1, 1
right-prop-edge, 2, 2
** Name: rock-bottom-bc Type: Displacement/Rotation
*Boundary, op=NEW
rock-bottom-bc-edge, 1, 1
rock-bottom-bc-edge, 2, 2
** Name: rock-up-bc Type: Displacement/Rotation
*Boundary, op=NEW
rock-up-bc-edge, 1, 1
rock-up-bc-edge, 2, 2
** Name: up-pore-bc Type: Pore pressure
*Boundary, op=NEW
**
** INTERACTIONS
**
** Interaction: excavation
*Model Change, remove
excavation-face,
**
** OUTPUT REQUESTS
**
*Restart, write, frequency=0
**
** FIELD OUTPUT: F-Output-1
**
*Output, field
*Node Output
CF, PHILSM, POR, PSILSM, RF, U
*Element Output, directions=YES
LE, S, SAT, VOIDR
*Contact Output
CDISP, CSTRESS
*element output,elset=xfem-ele-set
PFOPENXFEM
PORPRES
PFOPENXFEMCOMP
PORPRESCOMP
**
** HISTORY OUTPUT: H-Output-1
**
*Output, history, variable=PRESELECT
*End Step
** ----------------------------------------------------------------
**
** STEP: pore-balance
**
*Step, name=pore-balance, nlgeom=YES, unsymm=YES
*Soils, consolidation, end=PERIOD, utol=1e+09
0.05, 1., 1e-12, 1.,
**
** BOUNDARY CONDITIONS
**
** Name: after-exe-up-pore-bc Type: Pore pressure
*Boundary
soil-up-after-pore-bc-edge_PP_, 8, 8
**
** OUTPUT REQUESTS
**
*Restart, write, frequency=0
**
** FIELD OUTPUT: F-Output-1
**
*Output, field
*Node Output
CF, PHILSM, POR, PSILSM, RF, U
*Element Output, directions=YES
LE, S, SAT, VOIDR
*Contact Output
CDISP, CSTRESS
*element output,elset=xfem-ele-set
PFOPENXFEM
PORPRES
PFOPENXFEMCOMP
PORPRESCOMP
**
** HISTORY OUTPUT: H-Output-1
**
*Output, history, variable=PRESELECT
*End Step
** ----------------------------------------------------------------
**
** STEP: injection
**
*Step, name=injection, nlgeom=YES, unsymm=YES
*Soils, consolidation, end=PERIOD, utol=1e+09,stabilize=0.0002, allsdtol=0.05, continue=NO
0.05, 100., 1e-12, 5.,
*cflow,amplitude=volumerate,phantom=edge
soil-1.216, soil-1.217, 5e-05
**
** BOUNDARY CONDITIONS
**
** Name: prop_bc Type: Displacement/Rotation
*Boundary
soil-up-after-pore-bc-edge, 1, 1
soil-up-after-pore-bc-edge, 2, 2
**
** CONTROLS
**
*Controls, reset
*Controls, analysis=discontinuous
*Controls, parameters=time incrementation
, , , , , , , 20, , ,
**
** OUTPUT REQUESTS
**
*Restart, write, frequency=0
**
** FIELD OUTPUT: F-Output-1
**
*Output, field
*Node Output
CF, PHILSM, POR, PSILSM, RF, U
*Element Output, directions=YES
LE, S, SAT, VOIDR
*Contact Output
CDISP, CSTRESS
*element output,elset=xfem-ele-set
PFOPENXFEM
PORPRES
PFOPENXFEMCOMP
PORPRESCOMP
**
** HISTORY OUTPUT: H-Output-1
**
*Output, history, variable=PRESELECT
*End Step
** ----------------------------------------------------------------
**
** STEP: injection_1
**
*Step, name=injection_1, nlgeom=YES, unsymm=YES
*Soils, consolidation, end=PERIOD, utol=1e+09,stabilize=0.0002, allsdtol=0.05, continue=NO
0.05, 100., 1e-12, 5.,
*cflow,amplitude=volumerate_1,phantom=edge
soil-1.216, soil-1.217, 5e-05
**
** BOUNDARY CONDITIONS
**
** Name: prop_bc Type: Displacement/Rotation
*Boundary
soil-up-after-pore-bc-edge, 1, 1
soil-up-after-pore-bc-edge, 2, 2
**
** CONTROLS
**
*Controls, reset
*Controls, analysis=discontinuous
*Controls, parameters=time incrementation
, , , , , , , 20, , ,
**
** OUTPUT REQUESTS
**
*Restart, write, frequency=0
**
** FIELD OUTPUT: F-Output-1
**
*Output, field
*Node Output
CF, PHILSM, POR, PSILSM, RF, U
*Element Output, directions=YES
LE, S, SAT, VOIDR
*Contact Output
CDISP, CSTRESS
*element output,elset=xfem-ele-set
PFOPENXFEM
PORPRES
PFOPENXFEMCOMP
PORPRESCOMP
**
** HISTORY OUTPUT: H-Output-1
**
*Output, history, variable=PRESELECT
*End Step
** ----------------------------------------------------------------
**
** STEP: injection_2
**
*Step, name=injection_2, nlgeom=YES, unsymm=YES
*Soils, consolidation, end=PERIOD, utol=1e+09,stabilize=0.0002, allsdtol=0.05, continue=NO
0.05, 100., 1e-12, 5.,
*cflow,amplitude=volumerate_2,phantom=edge
soil-1.216, soil-1.217, 5e-05
**
** BOUNDARY CONDITIONS
**
** Name: prop_bc Type: Displacement/Rotation
*Boundary
soil-up-after-pore-bc-edge, 1, 1
soil-up-after-pore-bc-edge, 2, 2
**
** CONTROLS
**
*Controls, reset
*Controls, analysis=discontinuous
*Controls, parameters=time incrementation
, , , , , , , 20, , ,
**
** OUTPUT REQUESTS
**
*Restart, write, frequency=0
**
** FIELD OUTPUT: F-Output-1
**
*Output, field
*Node Output
CF, PHILSM, POR, PSILSM, RF, U
*Element Output, directions=YES
LE, S, SAT, VOIDR
*Contact Output
CDISP, CSTRESS
*element output,elset=xfem-ele-set
PFOPENXFEM
PORPRES
PFOPENXFEMCOMP
PORPRESCOMP
**
** HISTORY OUTPUT: H-Output-1
**
*Output, history, variable=PRESELECT
*End Step
